// SBML level 3 version 1

function myor(x1, x2, x3)
  0*(1 - x1)*(1 - x2)*(1 - x3) + (1 - x1)*(1 - x2)*x3 + (1 - x1)*x2*(1 - x3) + (1 - x1)*x2*x3 + x1*(1 - x2)*(1 - x3) + x1*(1 - x2)*x3 + x1*x2*(1 - x3) + x1*x2*x3;
end

model b5model()

  // Compartments:
  compartment cell = 1;

  // Species:
  species nik in cell = 0;
  species mkk4 in cell = 0;
  species ask1 in cell = 0;
  species map3k7 in cell = 0;
  species mkk7 in cell = 0;
  species tnfr in cell = 0;
  species egfr in cell = 0;
  species ph in cell = 0;
  species ex in cell = 0;
  species mek in cell = 0;
  species ras in cell = 0;
  species traf2 in cell = 0;
  species ikk in cell = 0;
  species akt in cell = 0;
  species pi3k in cell = 0;
  species ikb in cell = 0;
  species nfkb in cell = 0;
  species cjun in cell = 0;
  species jnk in cell = 0;
  species map3k1 in cell = 0;
  species erk in cell = 0;
  species raf1 in cell = 0;
  species sos in cell = 0;
  species p38 in cell = 0;
  species gsk3 in cell = 0;
  species ap1 in cell = 0;

  // Parameters:
  egf = 0;
  tnfa = 0;
  pi3k_inh = 0;
  raf1_inh = 0;
  map3k7_n_nik = 1;
  map3k7_k_nik = 0.0905;
  map3k7_n_mkk4 = 1.09;
  map3k7_k_mkk4 = 0.95;
  map3k1_n_mkk4 = 3.1526;
  map3k1_k_mkk4 = 0.4721;
  traf2_n_ask1 = 3.4873;
  traf2_k_ask1 = 0.15;
  traf2_n_map3k7 = 1;
  traf2_k_map3k7 = 0.0918;
  ask1_n_mkk7 = 3.5966;
  ask1_k_mkk7 = 0.7772;
  map3k1_n_mkk7 = 3.9788;
  map3k1_k_mkk7 = 0.4026;
  tnfa_n_tnfr = 1.0188;
  tnfa_k_tnfr = 0.1173;
  egf_n_egfr = 4.892;
  egf_k_egfr = 0.0905;
  erk_n_ph = 4.611;
  erk_k_ph = 0.1027;
  nfkb_n_ex = 4.9909;
  nfkb_k_ex = 0.4268;
  raf1_n_mek = 1.4875;
  raf1_k_mek = 0.5195;
  sos_n_ras = 1.454;
  sos_k_ras = 0.7119;
  tnfr_n_traf2 = 4.1622;
  tnfr_k_traf2 = 0.5476;
  nik_n_ikk = 4.997;
  nik_k_ikk = 0.1029;
  pi3k_n_akt = 1.0726;
  pi3k_k_akt = 0.9486;
  egfr_n_pi3k = 4.4151;
  egfr_k_pi3k = 0.0944;
  ex_n_ikb = 4.9991;
  ex_k_ikb = 0.6852;
  ikk_n_ikb = 1.5451;
  ikk_k_ikb = 0.95;
  ikb_n_nfkb = 4.9997;
  ikb_k_nfkb = 0.2329;
  jnk_n_cjun = 1.0759;
  jnk_k_cjun = 0.9496;
  mkk7_n_jnk = 4.8747;
  mkk7_k_jnk = 0.0913;
  ras_n_map3k1 = 1.1997;
  ras_k_map3k1 = 0.8298;
  mek_n_erk = 2.5354;
  mek_k_erk = 0.7099;
  ras_n_raf1 = 1;
  ras_k_raf1 = 0.2725;
  egfr_n_sos = 1.0012;
  egfr_k_sos = 0.9375;
  ph_n_sos = 1.4651;
  ph_k_sos = 0.72;
  mkk4_n_p38 = 1.0032;
  mkk4_k_p38 = 0.9329;
  akt_n_gsk3 = 1.0608;
  akt_k_gsk3 = 0.09;
  cjun_n_ap1 = 4.7985;
  cjun_k_ap1 = 0.2653;
  map3k7_nik_w = 1;
  tau_nik = 7.1398;
  map3k1_mkk4_w = 0;
  map3k7_mkk4_w = 0;
  map3k7_map3k1_mkk4_AND_w = 1;
  tau_mkk4 = 5.4167;
  traf2_ask1_w = 1;
  tau_ask1 = 5.2731;
  traf2_map3k7_w = 1;
  tau_map3k7 = 0.1;
  map3k1_mkk7_w = 1;
  ask1_mkk7_w = 1;
  ask1_map3k1_mkk7_AND_w = 0;
  tau_mkk7 = 10;
  tnfa_tnfr_w = 1;
  tau_tnfr = 9.1369;
  egf_egfr_w = 1;
  tau_egfr = 1.0937;
  erk_ph_w = 1;
  tau_ph = 0.106;
  nfkb_ex_w = 1;
  tau_ex = 0.6146;
  raf1_mek_w = 1;
  tau_mek = 9.5228;
  sos_ras_w = 1;
  tau_ras = 2.8385;
  tnfr_traf2_w = 1;
  tau_traf2 = 9.9362;
  nik_ikk_w = 1;
  tau_ikk = 5.7463;
  pi3k_akt_w = 1;
  tau_akt = 9.5917;
  egfr_pi3k_w = 1;
  tau_pi3k = 7.7292;
  ikk_ikb_w = 1;
  ex_ikb_w = 1;
  ex_ikk_ikb_AND_w = 0;
  tau_ikb = 0.6778;
  ikb_nfkb_w = 1;
  tau_nfkb = 0.9984;
  jnk_cjun_w = 1;
  tau_cjun = 9.6513;
  mkk7_jnk_w = 1;
  tau_jnk = 1.3215;
  ras_map3k1_w = 1;
  tau_map3k1 = 9.995;
  mek_erk_w = 1;
  tau_erk = 10;
  ras_raf1_w = 1;
  tau_raf1 = 0.8552;
  ph_sos_w = 0;
  egfr_sos_w = 0;
  egfr_ph_sos_AND_w = 1;
  tau_sos = 9.3196;
  mkk4_p38_w = 1;
  tau_p38 = 0.1;
  akt_gsk3_w = 1;
  tau_gsk3 = 0.2602;
  cjun_ap1_w = 1;
  tau_ap1 = 0.2045;

  // Assignment rules:
  map3k7_fhill_nik := map3k7^map3k7_n_nik/(map3k7_k_nik^map3k7_n_nik + map3k7^map3k7_n_nik)*(1 + map3k7_k_nik^map3k7_n_nik);
  map3k7_fhill_mkk4 := map3k7^map3k7_n_mkk4/(map3k7_k_mkk4^map3k7_n_mkk4 + map3k7^map3k7_n_mkk4)*(1 + map3k7_k_mkk4^map3k7_n_mkk4);
  map3k1_fhill_mkk4 := map3k1^map3k1_n_mkk4/(map3k1_k_mkk4^map3k1_n_mkk4 + map3k1^map3k1_n_mkk4)*(1 + map3k1_k_mkk4^map3k1_n_mkk4);
  traf2_fhill_ask1 := traf2^traf2_n_ask1/(traf2_k_ask1^traf2_n_ask1 + traf2^traf2_n_ask1)*(1 + traf2_k_ask1^traf2_n_ask1);
  traf2_fhill_map3k7 := traf2^traf2_n_map3k7/(traf2_k_map3k7^traf2_n_map3k7 + traf2^traf2_n_map3k7)*(1 + traf2_k_map3k7^traf2_n_map3k7);
  ask1_fhill_mkk7 := ask1^ask1_n_mkk7/(ask1_k_mkk7^ask1_n_mkk7 + ask1^ask1_n_mkk7)*(1 + ask1_k_mkk7^ask1_n_mkk7);
  map3k1_fhill_mkk7 := map3k1^map3k1_n_mkk7/(map3k1_k_mkk7^map3k1_n_mkk7 + map3k1^map3k1_n_mkk7)*(1 + map3k1_k_mkk7^map3k1_n_mkk7);
  tnfa_fhill_tnfr := tnfa^tnfa_n_tnfr/(tnfa_k_tnfr^tnfa_n_tnfr + tnfa^tnfa_n_tnfr)*(1 + tnfa_k_tnfr^tnfa_n_tnfr);
  egf_fhill_egfr := egf^egf_n_egfr/(egf_k_egfr^egf_n_egfr + egf^egf_n_egfr)*(1 + egf_k_egfr^egf_n_egfr);
  erk_fhill_ph := erk^erk_n_ph/(erk_k_ph^erk_n_ph + erk^erk_n_ph)*(1 + erk_k_ph^erk_n_ph);
  nfkb_fhill_ex := nfkb^nfkb_n_ex/(nfkb_k_ex^nfkb_n_ex + nfkb^nfkb_n_ex)*(1 + nfkb_k_ex^nfkb_n_ex);
  raf1_fhill_mek := raf1^raf1_n_mek/(raf1_k_mek^raf1_n_mek + raf1^raf1_n_mek)*(1 + raf1_k_mek^raf1_n_mek);
  sos_fhill_ras := sos^sos_n_ras/(sos_k_ras^sos_n_ras + sos^sos_n_ras)*(1 + sos_k_ras^sos_n_ras);
  tnfr_fhill_traf2 := tnfr^tnfr_n_traf2/(tnfr_k_traf2^tnfr_n_traf2 + tnfr^tnfr_n_traf2)*(1 + tnfr_k_traf2^tnfr_n_traf2);
  nik_fhill_ikk := nik^nik_n_ikk/(nik_k_ikk^nik_n_ikk + nik^nik_n_ikk)*(1 + nik_k_ikk^nik_n_ikk);
  pi3k_fhill_akt := pi3k^pi3k_n_akt/(pi3k_k_akt^pi3k_n_akt + pi3k^pi3k_n_akt)*(1 + pi3k_k_akt^pi3k_n_akt);
  egfr_fhill_pi3k := egfr^egfr_n_pi3k/(egfr_k_pi3k^egfr_n_pi3k + egfr^egfr_n_pi3k)*(1 + egfr_k_pi3k^egfr_n_pi3k);
  ex_fhill_ikb := ex^ex_n_ikb/(ex_k_ikb^ex_n_ikb + ex^ex_n_ikb)*(1 + ex_k_ikb^ex_n_ikb);
  ikk_fhill_ikb := ikk^ikk_n_ikb/(ikk_k_ikb^ikk_n_ikb + ikk^ikk_n_ikb)*(1 + ikk_k_ikb^ikk_n_ikb);
  ikb_fhill_nfkb := ikb^ikb_n_nfkb/(ikb_k_nfkb^ikb_n_nfkb + ikb^ikb_n_nfkb)*(1 + ikb_k_nfkb^ikb_n_nfkb);
  jnk_fhill_cjun := jnk^jnk_n_cjun/(jnk_k_cjun^jnk_n_cjun + jnk^jnk_n_cjun)*(1 + jnk_k_cjun^jnk_n_cjun);
  mkk7_fhill_jnk := mkk7^mkk7_n_jnk/(mkk7_k_jnk^mkk7_n_jnk + mkk7^mkk7_n_jnk)*(1 + mkk7_k_jnk^mkk7_n_jnk);
  ras_fhill_map3k1 := ras^ras_n_map3k1/(ras_k_map3k1^ras_n_map3k1 + ras^ras_n_map3k1)*(1 + ras_k_map3k1^ras_n_map3k1);
  mek_fhill_erk := mek^mek_n_erk/(mek_k_erk^mek_n_erk + mek^mek_n_erk)*(1 + mek_k_erk^mek_n_erk);
  ras_fhill_raf1 := ras^ras_n_raf1/(ras_k_raf1^ras_n_raf1 + ras^ras_n_raf1)*(1 + ras_k_raf1^ras_n_raf1);
  egfr_fhill_sos := egfr^egfr_n_sos/(egfr_k_sos^egfr_n_sos + egfr^egfr_n_sos)*(1 + egfr_k_sos^egfr_n_sos);
  ph_fhill_sos := ph^ph_n_sos/(ph_k_sos^ph_n_sos + ph^ph_n_sos)*(1 + ph_k_sos^ph_n_sos);
  mkk4_fhill_p38 := mkk4^mkk4_n_p38/(mkk4_k_p38^mkk4_n_p38 + mkk4^mkk4_n_p38)*(1 + mkk4_k_p38^mkk4_n_p38);
  akt_fhill_gsk3 := akt^akt_n_gsk3/(akt_k_gsk3^akt_n_gsk3 + akt^akt_n_gsk3)*(1 + akt_k_gsk3^akt_n_gsk3);
  cjun_fhill_ap1 := cjun^cjun_n_ap1/(cjun_k_ap1^cjun_n_ap1 + cjun^cjun_n_ap1)*(1 + cjun_k_ap1^cjun_n_ap1);

  // Reactions:
  J_nik: -> nik; (0*(1 - map3k7_fhill_nik) + map3k7_nik_w*map3k7_fhill_nik - nik)*tau_nik;
  J_mkk4: -> mkk4; (0*(1 - map3k7_fhill_mkk4)*(1 - map3k1_fhill_mkk4) + map3k1_mkk4_w*(1 - map3k7_fhill_mkk4)*map3k1_fhill_mkk4 + map3k7_mkk4_w*map3k7_fhill_mkk4*(1 - map3k1_fhill_mkk4) + myor(map3k7_mkk4_w, map3k1_mkk4_w, map3k7_map3k1_mkk4_AND_w)*map3k7_fhill_mkk4*map3k1_fhill_mkk4 - mkk4)*tau_mkk4;
  J_ask1: -> ask1; (0*(1 - traf2_fhill_ask1) + traf2_ask1_w*traf2_fhill_ask1 - ask1)*tau_ask1;
  J_map3k7: -> map3k7; (0*(1 - traf2_fhill_map3k7) + traf2_map3k7_w*traf2_fhill_map3k7 - map3k7)*tau_map3k7;
  J_mkk7: -> mkk7; (0*(1 - ask1_fhill_mkk7)*(1 - map3k1_fhill_mkk7) + map3k1_mkk7_w*(1 - ask1_fhill_mkk7)*map3k1_fhill_mkk7 + ask1_mkk7_w*ask1_fhill_mkk7*(1 - map3k1_fhill_mkk7) + myor(ask1_mkk7_w, map3k1_mkk7_w, ask1_map3k1_mkk7_AND_w)*ask1_fhill_mkk7*map3k1_fhill_mkk7 - mkk7)*tau_mkk7;
  J_tnfr: -> tnfr; (0*(1 - tnfa_fhill_tnfr) + tnfa_tnfr_w*tnfa_fhill_tnfr - tnfr)*tau_tnfr;
  J_egfr: -> egfr; (0*(1 - egf_fhill_egfr) + egf_egfr_w*egf_fhill_egfr - egfr)*tau_egfr;
  J_ph: -> ph; (0*(1 - erk_fhill_ph) + erk_ph_w*erk_fhill_ph - ph)*tau_ph;
  J_ex: -> ex; (0*(1 - nfkb_fhill_ex) + nfkb_ex_w*nfkb_fhill_ex - ex)*tau_ex;
  J_mek: -> mek; (0*(1 - raf1_fhill_mek) + raf1_mek_w*raf1_fhill_mek - mek)*tau_mek;
  J_ras: -> ras; (0*(1 - sos_fhill_ras) + sos_ras_w*sos_fhill_ras - ras)*tau_ras;
  J_traf2: -> traf2; (0*(1 - tnfr_fhill_traf2) + tnfr_traf2_w*tnfr_fhill_traf2 - traf2)*tau_traf2;
  J_ikk: -> ikk; (0*(1 - nik_fhill_ikk) + nik_ikk_w*nik_fhill_ikk - ikk)*tau_ikk;
  J_akt: -> akt; (0*(1 - pi3k_fhill_akt) + pi3k_akt_w*pi3k_fhill_akt - akt)*tau_akt;
  J_pi3k: -> pi3k; (0*(1 - egfr_fhill_pi3k) + egfr_pi3k_w*egfr_fhill_pi3k - pi3k)*tau_pi3k*(1 - pi3k_inh);
  J_ikb: -> ikb; (ikk_ikb_w*(1 - ex_fhill_ikb)*(1 - ikk_fhill_ikb) + 0*(1 - ex_fhill_ikb)*ikk_fhill_ikb + myor(ex_ikb_w, ikk_ikb_w, ex_ikk_ikb_AND_w)*ex_fhill_ikb*(1 - ikk_fhill_ikb) + ex_ikb_w*ex_fhill_ikb*ikk_fhill_ikb - ikb)*tau_ikb;
  J_nfkb: -> nfkb; (ikb_nfkb_w*(1 - ikb_fhill_nfkb) + 0*ikb_fhill_nfkb - nfkb)*tau_nfkb;
  J_cjun: -> cjun; (0*(1 - jnk_fhill_cjun) + jnk_cjun_w*jnk_fhill_cjun - cjun)*tau_cjun;
  J_jnk: -> jnk; (0*(1 - mkk7_fhill_jnk) + mkk7_jnk_w*mkk7_fhill_jnk - jnk)*tau_jnk;
  J_map3k1: -> map3k1; (0*(1 - ras_fhill_map3k1) + ras_map3k1_w*ras_fhill_map3k1 - map3k1)*tau_map3k1;
  J_erk: -> erk; (0*(1 - mek_fhill_erk) + mek_erk_w*mek_fhill_erk - erk)*tau_erk;
  J_raf1: -> raf1; (0*(1 - ras_fhill_raf1) + ras_raf1_w*ras_fhill_raf1 - raf1)*tau_raf1*(1 - raf1_inh);
  J_sos: -> sos; (ph_sos_w*(1 - egfr_fhill_sos)*(1 - ph_fhill_sos) + 0*(1 - egfr_fhill_sos)*ph_fhill_sos + myor(egfr_sos_w, ph_sos_w, egfr_ph_sos_AND_w)*egfr_fhill_sos*(1 - ph_fhill_sos) + egfr_sos_w*egfr_fhill_sos*ph_fhill_sos - sos)*tau_sos;
  J_p38: -> p38; (0*(1 - mkk4_fhill_p38) + mkk4_p38_w*mkk4_fhill_p38 - p38)*tau_p38;
  J_gsk3: -> gsk3; (akt_gsk3_w*(1 - akt_fhill_gsk3) + 0*akt_fhill_gsk3 - gsk3)*tau_gsk3;
  J_ap1: -> ap1; (0*(1 - cjun_fhill_ap1) + cjun_ap1_w*cjun_fhill_ap1 - ap1)*tau_ap1;
end
